// COMSOL Multiphysics 6.2.0.278 model "Generic2D.mph"
// Dielectric barrier discharge in argon
// Outline of the model tree

Parameters
  Geometry = 0  // _______________
  ElecDist = 3.5[mm]  // Gap width
  ElecRadius = 0.5642[cm]  // Electrode radius
  DBthickness_1 = 0.5[mm]  // Thickness of dielectric_1
  DBthickness_2 = 1.5[mm]  // Thickness of dielectric_2
  Discharge = 0  // _______________
  U0 = 6[kV]  // Applied voltage
  p0 = 760[Torr]  // Constant gas pressure
  T0 = 300[K]  // Constant gas temperature
  freq = 60[kHz]  // Frequency
  Stabilization = 0  // _______________
  SrcStabFac = N_A_const[mol]*1[m^-3*s^-1]  // Factor for source term stabilization
  SrcStabPar = 1  // Parameter for source term stabilization

Functions
  Fun_Nb3: Interpolation
    table = 
      {0.0000000e+00, 4.4110000e+21}
      {2.8248600e-04, 4.4110000e+21}
      {5.6497200e-04, 4.4110000e+21}
      {8.4745800e-04, 4.4110000e+21}
      {1.1299400e-03, 4.4110000e+21}
      {1.4124300e-03, 4.4109999e+21}
      {1.6949200e-03, 4.4109999e+21}
      {1.9774000e-03, 4.4109999e+21}
      {2.2598900e-03, 4.4109999e+21}
      {2.5423700e-03, 4.4109999e+21}
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    fununit = 1/(m*V*s)
    argunit = V*m^2
  Fun_ND4: Interpolation
    table = 
      {3.5307500e-02, 2.5292800e+24}
      {3.5596900e-02, 2.6116200e+24}
      {3.6609700e-02, 2.9194900e+24}
      {3.8747600e-02, 3.6061200e+24}
      {4.2557100e-02, 4.8495300e+24}
      {4.8561500e-02, 6.7858000e+24}
      {5.7086600e-02, 9.4575000e+24}
      {6.8128800e-02, 1.2788300e+25}
      {8.1326600e-02, 1.6595600e+25}
      {9.6049600e-02, 2.0636800e+25}
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    fununit = 1/(m*s)
    argunit = V
  Fun_Nb4: Interpolation
    table = 
      {3.5307500e-02, 1.0745400e+26}
      {3.5596900e-02, 1.0859200e+26}
      {3.6609700e-02, 1.1205600e+26}
      {3.8747600e-02, 1.1782800e+26}
      {4.2557100e-02, 1.2557700e+26}
      {4.8561500e-02, 1.3466900e+26}
      {5.7086600e-02, 1.4422600e+26}
      {6.8128800e-02, 1.5327800e+26}
      {8.1326600e-02, 1.6096200e+26}
      {9.6049600e-02, 1.6669300e+26}
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    fununit = 1/(m*V*s)
    argunit = V
  Fun_NDdUmEps: Interpolation
    table = 
      {3.5307500e-02, 5.7888000e+24}
      {3.5596900e-02, 6.1995300e+24}
      {3.6609700e-02, 7.7890800e+24}
      {3.8747600e-02, 1.1315200e+25}
      {4.2557100e-02, 1.7166900e+25}
      {4.8561500e-02, 2.4791200e+25}
      {5.7086600e-02, 3.2903700e+25}
      {6.8128800e-02, 4.0259300e+25}
      {8.1326600e-02, 4.6185600e+25}
      {9.6049600e-02, 5.0575200e+25}
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    fununit = 1/(m*s)
    argunit = V
  Fun_NbdUmEps: Interpolation
    table = 
      {3.5307500e-02, 2.4593100e+26}
      {3.5596900e-02, 2.5193900e+26}
      {3.6609700e-02, 2.7020300e+26}
      {3.8747600e-02, 2.9886800e+26}
      {4.2557100e-02, 3.3155500e+26}
      {4.8561500e-02, 3.5944500e+26}
      {5.7086600e-02, 3.7601600e+26}
      {6.8128800e-02, 3.7984700e+26}
      {8.1326600e-02, 3.7347300e+26}
      {9.6049600e-02, 3.6066800e+26}
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    fununit = 1/(m*V*s)
    argunit = V
  Fun_k1: Interpolation
    table = 
      {3.5307500e-02, 0.0000000e+00}
      {3.5596900e-02, 0.0000000e+00}
      {3.6609700e-02, 0.0000000e+00}
      {3.8747600e-02, 0.0000000e+00}
      {4.2557100e-02, 0.0000000e+00}
      {4.8561500e-02, 0.0000000e+00}
      {5.7086600e-02, 0.0000000e+00}
      {6.8128800e-02, 0.0000000e+00}
      {8.1326600e-02, 0.0000000e+00}
      {9.6049600e-02, 0.0000000e+00}
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    fununit = m^3/s
    argunit = V
  Fun_k2: Interpolation
    table = 
      {3.5307500e-02, 0.0000000e+00}
      {3.5596900e-02, 0.0000000e+00}
      {3.6609700e-02, 0.0000000e+00}
      {3.8747600e-02, 0.0000000e+00}
      {4.2557100e-02, 0.0000000e+00}
      {4.8561500e-02, 0.0000000e+00}
      {5.7086600e-02, 0.0000000e+00}
      {6.8128800e-02, 0.0000000e+00}
      {8.1326600e-02, 0.0000000e+00}
      {9.6049600e-02, 0.0000000e+00}
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    fununit = m^3/s
    argunit = V
  Fun_k3: Interpolation
    table = 
      {3.5307500e-02, 2.5844100e-16}
      {3.5596900e-02, 2.5911600e-16}
      {3.6609700e-02, 2.6125200e-16}
      {3.8747600e-02, 2.6514300e-16}
      {4.2557100e-02, 2.7114100e-16}
      {4.8561500e-02, 2.7945500e-16}
      {5.7086600e-02, 2.9000200e-16}
      {6.8128800e-02, 3.0234900e-16}
      {8.1326600e-02, 3.1578700e-16}
      {9.6049600e-02, 3.2949300e-16}
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    fununit = m^3/s
    argunit = V
  Fun_k4: Interpolation
    table = 
      {3.5307500e-02, 0.0000000e+00}
      {3.5596900e-02, 0.0000000e+00}
      {3.6609700e-02, 0.0000000e+00}
      {3.8747600e-02, 0.0000000e+00}
      {4.2557100e-02, 0.0000000e+00}
      {4.8561500e-02, 0.0000000e+00}
      {5.7086600e-02, 0.0000000e+00}
      {6.8128800e-02, 0.0000000e+00}
      {8.1326600e-02, 0.0000000e+00}
      {9.6049600e-02, 0.0000000e+00}
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    fununit = m^3/s
    argunit = V
  Fun_k7: Interpolation
    table = 
      {3.5307500e-02, 3.1114000e-27}
      {3.5596900e-02, 8.6708300e-24}
      {3.6609700e-02, 3.5775700e-23}
      {3.8747600e-02, 8.4629700e-23}
      {4.2557100e-02, 1.6034000e-22}
      {4.8561500e-02, 2.6866400e-22}
      {5.7086600e-02, 4.1432800e-22}
      {6.8128800e-02, 5.9933900e-22}
      {8.1326600e-02, 8.2205300e-22}
      {9.6049600e-02, 1.0774500e-21}
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    fununit = m^3/s
    argunit = V

Variables
  constants "Physical constants"
    e0 = 1.602176487e-19[C]  // Elementary charge (SI)
    e0fac = 1.602176487e-19  // eV to J conversion factor
    amu = 1.660538782e-27[kg]  // Atomar mass unit (SI)
    me = 9.10938215e-31[kg]  // Electron mass (SI)
    kB = 1.3806504e-23[J/K]  // Boltzmann constant (SI)
    epsilon0 = 8.854187817e-12[F/m]  // Vacuum permittivity (SI)
  propelecp "Properties of powered electrode" on selection poweredelectrode
    gamma = 0.07  // SEE at the powered electrode
    r1 = 0.3  // Reflection coefficient at powered electrode
    r2 = 0.3  // Reflection coefficient at powered electrode
    r3 = 0.0005  // Reflection coefficient at powered electrode
    r4 = 0.3  // Reflection coefficient at powered electrode
    umWall = 2[V]  // Mean energy of secondary electrons
  propelecg "Properties of grounded electrode" on selection groundedelectrode
    gamma = 0.07  // SEE at the powered electrode
    r1 = 0.3  // Reflection coefficient at grounded electrode
    r2 = 0.3  // Reflection coefficient at grounded electrode
    r3 = 0.0005  // Reflection coefficient at grounded electrode
    r4 = 0.3  // Reflection coefficient at grounded electrode
    umWall = 2[V]  // Mean energy of secondary electrons
  propdielectrics_1 "Properties of dielectric wall 1" on selection dielectricwall_1
    gamma = 0.02  // SEE at the dielectrics
    r1 = 0.3  // Reflection coefficient at wall (dielectrics)
    r2 = 0.3  // Reflection coefficient at wall (dielectrics)
    r3 = 0.005  // Reflection coefficient at wall (dielectrics)
    r4 = 0.7  // Reflection coefficient at wall (dielectrics)
    umWall = 3[V]  // Mean energy of secondary electrons
  propdielectrics_2 "Properties of dielectric wall 2" on selection dielectricwall_2
    gamma = 0.03  // SEE at the dielectrics
    r1 = 0.3  // Reflection coefficient at wall (dielectrics)
    r2 = 0.3  // Reflection coefficient at wall (dielectrics)
    r3 = 0.005  // Reflection coefficient at wall (dielectrics)
    r4 = 0.4  // Reflection coefficient at wall (dielectrics)
    umWall = 4[V]  // Mean energy of secondary electrons
  specprop "Species properties" on selection plasmadomain
    M1 = 6.6335e-26[kg]  // Particle mass of species Ar[1p0]
    M2 = 6.6335e-26[kg]  // Particle mass of species Ar[*]
    M3 = 6.6335e-26[kg]  // Particle mass of species Ar[+]
    M4 = 9.1094e-31[kg]  // Particle mass of species e
    T1 = Tgas  // Temperature of species Ar[1p0]
    T2 = Tgas  // Temperature of species Ar[*]
    T3 = Tgas  // Temperature of species Ar[+]
    T4 = 2/3*Umean*e0/kB  // Temperature of electrons
    vth1 = sqrt(8*kB*T1/(pi*M1))  // Thermal velocity of species Ar[1p0]
    vth2 = sqrt(8*kB*T2/(pi*M2))  // Thermal velocity of species Ar[*]
    vth3 = sqrt(8*kB*T3/(pi*M3))  // Thermal velocity of species Ar[+]
    vth4 = sqrt(8*kB*T4/(pi*M4))  // Thermal velocity of electrons
    V3_y = -b3*Phiy
    V3_x = -b3*Phix
    V4_y = b4*Phiy
    V4_x = b4*Phix
    Veps_y = beps*Phiy
    Veps_x = beps*Phix
    N1 = N  // Constant gas density for background gas
    N2 = exp(n2)*1[1/m^3]  // Density of Ar[*]
    N3 = exp(n3)*1[1/m^3]  // Density of Ar[+]
    N4 = exp(n4)*1[1/m^3]  // Density of e
    We = exp(we)*1[V/m^3]  // Electron energy density
  plasma "Plasma variables" on selection plasmadomain
    N = p/(kB*Tgas)  // Gas density
    Umean = We/N4  // Mean electron energy
    Te = 2/3*Umean*e0/kB  // Temperature of electrons
    E = sqrt(max(Phix^2+Phiy^2,eps))  // Electric field strenth
    EdN = E*1e21/N  // Reduced electric field in Townsend (Td)
    Tgas = T0  // Gas temperature
    p = p0  // Gas pressure
  gas "Gas properties" on selection plasmadomain
    rho = e0*(-N4+1*N3)  // Space charge density
    epsilonr = 1  // relative permittivity
  dielectric_1 "Dielectric properties 1" on selection dielectric_1
    rho = 0  // Space charge density
    epsilonr = 4  // relative permittivity
  dielectric_2 "Dielectric properties 2" on selection dielectric_2
    rho = 0  // Space charge density
    epsilonr = 9  // relative permittivity
  transportcoeffs "Transport coefficients" on selection plasmadomain
    D2 = 1.738e+20[1/(m*s)]/N  // Diffusion coefficient of Ar[*]
    D3 = kB/e0*T3*b3  // Diffusion coefficient of Ar[+]
    b3 = Fun_Nb3(EdN)/N  // Mobility of Ar[+]
    D4 = Fun_ND4(Umean)/N  // Diffusion coefficient of e
    b4 = Fun_Nb4(Umean)/N  // Mobility of e
    Deps = Fun_NDdUmEps(Umean)/N  // Electron energy diffusion coefficient
    beps = Fun_NbdUmEps(Umean)/N  // Electron energy mobility
  rates "Rate coefficients" on selection plasmadomain
    k1 = Fun_k1(Umean)  // Rate coefficent 1: 1. Ar[1p0] + e -> Ar[*] + e
    k2 = Fun_k2(Umean)  // Rate coefficent 2: 2. Ar[1p0] + e -> Ar[+] + e + e
    k3 = Fun_k3(Umean)  // Rate coefficent 3: 3. Ar[*] + e -> Ar[1p0] + e
    k4 = Fun_k4(Umean)  // Rate coefficent 4: 4. Ar[*] + e -> Ar[+] + e + e
    k5 = 8.1e-16[m^3/s]  // Rate coefficent 5: 5. Ar[*] + Ar[*] -> Ar[+] + e + Ar[1p0]
    k6 = 1000000[m^0/s]  // Rate coefficent 6: 6. Ar[*] -> 0
    k7 = Fun_k7(Umean)  // Rate coefficent 7: 7. Ar[1p0] + e -> Ar[1p0] + e
  fluxes on selection plasmadomain
    F2_y = -d(D2*N2,y)
    F2_x = -d(D2*N2,x)
    F3_y = -d(D3*N3,y) + V3_y*N3
    F3_x = -d(D3*N3,x) + V3_x*N3
    F4_y = -d(D4*N4,y) + V4_y*N4
    F4_x = -d(D4*N4,x) + V4_x*N4
    Q_y = -d(Deps*We,y) + Veps_y*We
    Q_x = -d(Deps*We,x) + Veps_x*We
  bndfluxes "Boundary fluxes" on selection plasmaboundaries
    F2_boundary = ((1-r2)/(1+r2))*(0.5*vth2*N2)
    F3_boundary = ((1-r3)/(1+r3))*(abs(V3_y*eq3.ny + V3_x*eq3.nx)*N3 + 0.5*vth3*N3)
    F4_boundary = ((1-r4)/(1+r4))*(abs(V4_y*eq4.ny + V4_x*eq4.nx)*N4 + 0.5*vth4*N4) - (2*gamma/(1+r4))*(max(F3_y*eq4.ny + F3_x*eq4.nx,0))
    Q_boundary = ((1-r4)/(1+r4))*(abs(Veps_y*eq4.ny + Veps_x*eq4.nx)*We + 2/3*vth4*We) - umWall*(2*gamma/(1+r4))*(max(F3_y*eq4.ny + F3_x*eq4.nx,0))
    DisplacementCurrent = -epsilon0*epsilonr*(Phiyt*poeq.ny+Phixt*poeq.nx)  // Displacement current density
    NormalChCFlux = e0*(-F4_boundary+1*F3_boundary)  // Charge carrier flux onto the wall
  sources "Source terms" on selection plasmadomain
    S1 = k3*N2*N4+k5*N2^2-k1*N1*N4-k2*N1*N4  // Source term for species Ar_1p0
    S2 = k1*N1*N4-k3*N2*N4-k4*N2*N4-2*k5*N2^2-k6*N2  // Source term for species Ar_star
    S3 = k2*N1*N4+k4*N2*N4+k5*N2^2  // Source term for species Ar_plus
    S4 = k2*N1*N4+k4*N2*N4+k5*N2^2  // Source term for species electrons
    Seps = Phix*F4_x+Phiy*F4_y-11.55[V]*k1*N1*N4-15.76[V]*k2*N1*N4+11.55[V]*k3*N2*N4-4.21[V]*k4*N2*N4+7.34[V]*k5*N2^2-1[V]*k7*N1*N4  // Source term for electron energy balance
  electrical
    Icond = IntCPBoundary(NormalChCFlux)/(ElecRadius^2*pi)  // Conduction current
    Idispl = IntCPBoundary(DisplacementCurrent)/(ElecRadius^2*pi)  // Displacement current
    Idischarge = Icond+Idispl  // Discharge current

Selections
  plasmadomain: Explicit on domains 2
  dielectric_1: Explicit "Dielectric 1" on domains 1
  dielectric_2: Explicit "Dielectric 2" on domains 3
  dielectric: Explicit on domains 1, 3
  plasmaboundaries: Explicit on boundaries 3, 4, 6, 9
  poweredelectrode: Explicit on boundaries 2
  currentprobebndry: Explicit "Current probe boundary" on boundaries 4
  groundedelectrode: Explicit on boundaries 7
  electrodes: Explicit on boundaries 2, 7
  dielectricwall_1: Explicit "Dielectric wall 1" on boundaries 4
  dielectricwall_2: Explicit "Dielectric wall 2" on boundaries 6
  dielectricwalls: Explicit on boundaries 4, 6

Couplings
  intop1: Integration "IntCPBoundary" on selection currentprobebndry | opname = IntCPBoundary

Geometry
  Geom2D "2D planparallel with two dielectrics" (2D, length unit m)
    r1: Rectangle | size = {ElecRadius, DBthickness_1}
    r2: Rectangle | pos = {0, DBthickness_1}; size = {ElecRadius, ElecDist}
    r3: Rectangle | pos = {0, ElecDist+DBthickness_1}; size = {ElecRadius, DBthickness_2}
    fin: Finalize "Form Union"

Physics
  sceq: BoundaryODE "Surface charge accumulation" on selection dielectricwalls
    dependent variable sigma
    ShapeProperty.order = 1
    Units.DependentVariableQuantity = none
    Units.CustomDependentVariableUnit = C/m^2
    Units.CustomSourceTermUnit = C/(m^2*s)
    dode1: DistributedODE (default) | f = NormalChCFlux; da = 1
    init1: init "Initial Values 1" (default) | sigma = 0
  poeq: PoissonEquation "Poisson's Equation" on all domains
    dependent variable Phi
    Units.DependentVariableQuantity = electricpotential
    Units.SourceTermQuantity = spacechargedensity
    peq1: PoissonEquation "Poisson's Equation 1" (default) | f = rho; c = {epsilon0*epsilonr, 0, 0, epsilon0*epsilonr}
    zflx1: ZeroFluxBoundary "Zero Flux 1" (default)
    init1: init "Initial Values 1" (default) | Phi = 0
    dir1: DirichletBoundary "Applied voltage" on selection poweredelectrode | r = PoweredVoltage
    dir2: DirichletBoundary "Ground" on selection groundedelectrode | r = 0
    flux1: FluxBoundary "Flux/Source 1" on selection dielectricwalls | g = sigma
  eq2: GeneralFormPDE "Species Ar[*]" on selection plasmadomain
    dependent variable n2
    ShapeProperty.order = 1
    Units.DependentVariableQuantity = none
    Units.CustomDependentVariableUnit = 1
    Units.CustomSourceTermUnit = 1/(m^3*s)
    gfeq1: GeneralFormPDE (default) | f = S2 + SrcStabFac*exp(-SrcStabPar*n2); Ga = {F2_x, F2_y}; da = N2
    zflx1: ZeroFluxBoundary "Zero Flux 1" (default)
    init1: init "Initial Values 1" (default) | n2 = log(1000000000000)
    flux1: FluxBoundary "Flux/Source 1" on selection plasmaboundaries | g = -F2_boundary
  eq3: GeneralFormPDE "Species Ar[+]" on selection plasmadomain
    dependent variable n3
    ShapeProperty.order = 1
    Units.DependentVariableQuantity = none
    Units.CustomDependentVariableUnit = 1
    Units.CustomSourceTermUnit = 1/(m^3*s)
    gfeq1: GeneralFormPDE (default) | f = S3 + SrcStabFac*exp(-SrcStabPar*n3); Ga = {F3_x, F3_y}; da = N3
    zflx1: ZeroFluxBoundary "Zero Flux 1" (default)
    init1: init "Initial Values 1" (default) | n3 = log(1000000000000)
    flux1: FluxBoundary "Flux/Source 1" on selection plasmaboundaries | g = -F3_boundary
  eq4: GeneralFormPDE "Species e" on selection plasmadomain
    dependent variable n4
    ShapeProperty.order = 1
    Units.DependentVariableQuantity = none
    Units.CustomDependentVariableUnit = 1
    Units.CustomSourceTermUnit = 1/(m^3*s)
    gfeq1: GeneralFormPDE (default) | f = S4 + SrcStabFac*exp(-SrcStabPar*n4); Ga = {F4_x, F4_y}; da = N4
    zflx1: ZeroFluxBoundary "Zero Flux 1" (default)
    init1: init "Initial Values 1" (default) | n4 = log(1000000000000)
    flux1: FluxBoundary "Flux/Source 1" on selection plasmaboundaries | g = -F4_boundary
  eq5: GeneralFormPDE "Energy density of electrons" on selection plasmadomain
    dependent variable we
    ShapeProperty.order = 1
    Units.DependentVariableQuantity = none
    Units.CustomDependentVariableUnit = 1
    Units.CustomSourceTermUnit = V/(m^3*s)
    gfeq1: GeneralFormPDE (default) | f = Seps + SrcStabFac*exp(-SrcStabPar*we)*1[V]; Ga = {Q_x, Q_y}; da = We
    zflx1: ZeroFluxBoundary "Zero Flux 1" (default)
    init1: init "Initial Values 1" (default) | we = log(3*1000000000000)
    flux1: FluxBoundary "Flux/Source 1" on selection plasmaboundaries | g = -Q_boundary

Mesh
  mesh1 "Geometric_8"
    size: MeshSizeDefault | hmax = 3.78E-4; hmin = 1.69E-6; hcurve = 0.3; hgrad = 1.3
    ftri1: FreeTri "Free Triangular 1" on remaining entities
      size1: Size on selection plasmadomain | hmax = 0.0001; hauto = 3; custom = on

Studies
  FluidPoisson "Study Plasma"
    time: Transient "Time Dependent" | tlist = range(0,1e-8,1/freq); rtol = 1e-3

Solver configurations
  sol1 "Solution 1" (study FluidPoisson)
    v1: Variables "Dependent Variables 1" | scalemethod = manual; scaleval = 10
    t1: Time "Time-Dependent Solver 1"
      tlist = range(0,1e-8,1/freq)
      atolglobalmethod = unscaled
      atolglobalvaluemethod = manual
      atolglobal = 1e-4
      initialstepbdf = 1e-15
      maxorder = 2
      rhoinf = 0
      predictor = constant
      dDef: Direct | linsolver = pardiso
      fc1: FullyCoupled "Fully Coupled Const Newton"
        linsolver = dDef
        dtech = const
        maxiter = 40
        jtech = once
        stabacc = aacc

Datasets
  dset1: Solution | solution = sol1