// COMSOL Multiphysics 6.2.0.278 model "Generic1D.mph"
// Low-temperature plasma modelling
// Outline of the model tree

Parameters
  ElecDist = 0.01[m]  // Gap width
  ElecLength = 0.05[m]  // Electrode length
  ElecWidth = 0.02[m]  // Electrode width
  Area = ElecLength*ElecWidth  // Electrode area
  DBthickness = 0.002[m]  // Thickness of dielectric at powered electrode
  U0 = 300[V]  // Applied voltage
  p0 = 133.322[Pa]  // Constant gas pressure
  T0 = 300[K]  // Constant gas temperature
  Stabilization = 0  // Enable source term stabilization
  SrcStabFac = N_A_const[mol]*1[m^-3*s^-1]  // Factor for source term stabilization
  SrcStabPar = 1  // Parameter for source term stabilization

Functions
  Fun_ND4: Analytic | expr = kB/e0*T*b; args = {T, b}; fununit = 1/m/s; argunit = {K, m^2/V/s}
  Fun_Nb4: Interpolation
    table = 
      {0.0000000e+00, 4.4110000e+21}
      {2.8248600e-04, 4.4110000e+21}
      {5.6497200e-04, 4.4110000e+21}
      {8.4745800e-04, 4.4110000e+21}
      {1.1299400e-03, 4.4110000e+21}
      {1.4124300e-03, 4.4109999e+21}
      {1.6949200e-03, 4.4109999e+21}
      {1.9774000e-03, 4.4109999e+21}
      {2.2598900e-03, 4.4109999e+21}
      {2.5423700e-03, 4.4109999e+21}
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    fununit = 1/m/V/s
    argunit = Td
  Fun_ND1: Interpolation
    table = 
      {3.5307500e-02, 2.5292800e+24}
      {3.5596900e-02, 2.6116200e+24}
      {3.6609700e-02, 2.9194900e+24}
      {3.8747600e-02, 3.6061200e+24}
      {4.2557100e-02, 4.8495300e+24}
      {4.8561500e-02, 6.7858000e+24}
      {5.7086600e-02, 9.4575000e+24}
      {6.8128800e-02, 1.2788300e+25}
      {8.1326600e-02, 1.6595600e+25}
      {9.6049600e-02, 2.0636800e+25}
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    fununit = 1/m/s
    argunit = V
  Fun_Nb1: Interpolation
    table = 
      {3.5307500e-02, 1.0745400e+26}
      {3.5596900e-02, 1.0859200e+26}
      {3.6609700e-02, 1.1205600e+26}
      {3.8747600e-02, 1.1782800e+26}
      {4.2557100e-02, 1.2557700e+26}
      {4.8561500e-02, 1.3466900e+26}
      {5.7086600e-02, 1.4422600e+26}
      {6.8128800e-02, 1.5327800e+26}
      {8.1326600e-02, 1.6096200e+26}
      {9.6049600e-02, 1.6669300e+26}
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    fununit = 1/m/V/s
    argunit = V
  Fun_k2: Interpolation
    table = 
      {2.5073700e+00, 0.0000000e+00}
      {2.7801200e+00, 1.2505800e-34}
      {3.0213800e+00, 4.5768900e-30}
      {3.2398700e+00, 5.0934800e-27}
      {3.4412400e+00, 5.8606600e-25}
      {3.6294500e+00, 1.7144400e-23}
      {3.8072600e+00, 2.0400200e-22}
      {3.8928400e+00, 5.5185900e-22}
      {3.9763500e+00, 1.3149300e-21}
      {4.0577700e+00, 2.8152900e-21}
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    fununit = m^3/s
    argunit = V
  Fun_k3: Interpolation
    table = 
      {3.8072600e+00, 0.0000000e+00}
      {3.8928400e+00, 1.2076600e-39}
      {3.9763500e+00, 1.8647000e-38}
      {4.0577700e+00, 2.1718800e-37}
      {4.1370000e+00, 1.9833900e-36}
      {4.2138600e+00, 1.4665100e-35}
      {4.2881100e+00, 9.0193300e-35}
      {4.3594600e+00, 4.7200900e-34}
      {4.4276700e+00, 2.1429100e-33}
      {4.4925000e+00, 8.5803500e-33}
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    fununit = m^3/s
    argunit = V
  Fun_k4: Interpolation
    table = 
      {5.9962800e-01, 0.0000000e+00}
      {7.1962300e-01, 2.7685100e-44}
      {8.2403900e-01, 9.1086300e-38}
      {9.1709700e-01, 4.9132400e-33}
      {1.0015000e+00, 1.5157700e-29}
      {1.0791700e+00, 6.2560200e-27}
      {1.1514600e+00, 6.1812700e-25}
      {1.2193200e+00, 2.1812400e-23}
      {1.2834600e+00, 3.6259100e-22}
      {1.5638800e+00, 9.9303300e-19}
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    fununit = m^3/s
    argunit = V
  Fun_k5: Interpolation
    table = 
      {3.5307500e-02, 2.5844100e-16}
      {3.5596900e-02, 2.5911600e-16}
      {3.6609700e-02, 2.6125200e-16}
      {3.8747600e-02, 2.6514300e-16}
      {4.2557100e-02, 2.7114100e-16}
      {4.8561500e-02, 2.7945500e-16}
      {5.7086600e-02, 2.9000200e-16}
      {6.8128800e-02, 3.0234900e-16}
      {8.1326600e-02, 3.1578700e-16}
      {9.6049600e-02, 3.2949300e-16}
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    fununit = m^3/s
    argunit = V
  Fun_kene1: Interpolation
    table = 
      {3.5307500e-02, 3.1114000e-27}
      {3.5596900e-02, 8.6708300e-24}
      {3.6609700e-02, 3.5775700e-23}
      {3.8747600e-02, 8.4629700e-23}
      {4.2557100e-02, 1.6034000e-22}
      {4.8561500e-02, 2.6866400e-22}
      {5.7086600e-02, 4.1432800e-22}
      {6.8128800e-02, 5.9933900e-22}
      {8.1326600e-02, 8.2205300e-22}
      {9.6049600e-02, 1.0774500e-21}
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    fununit = V*m^3/s
    argunit = V
  Fun_kene2: Analytic | expr = -11.55[V]*k; args = k; fununit = V*m^3/s; argunit = m^3/s
  Fun_kene3: Analytic | expr = -15.76[V]*k; args = k; fununit = V*m^3/s; argunit = m^3/s
  Fun_kene4: Analytic | expr = -4.21[V]*k; args = k; fununit = V*m^3/s; argunit = m^3/s
  Fun_kene5: Analytic | expr = 11.55[V]*k; args = k; fununit = V*m^3/s; argunit = m^3/s
  Fun_kene6: Analytic | expr = 7.34[V]*k; args = k; fununit = V*m^3/s; argunit = m^3/s

Variables
  constants "Physical constants"
    e0 = 1.602176487e-19[C]  // Elementary charge (SI)
    e0fac = 1.602176487e-19  // eV to J conversion factor
    amu = 1.660538782e-27[kg]  // Atomar mass unit (SI)
    me = 9.10938215e-31[kg]  // Electron mass (SI)
    kB = 1.3806504e-23[J/K]  // Boltzmann constant (SI)
    epsilon0 = 8.854187817e-12[F/m]  // Vacuum permittivity (SI)
  propelecp "Properties of powered electrode" on selection poweredelectrode
    gamma = 0.07  // SEE at the powered electrode
    r1 = 0.3  // Reflection coefficient at powered electrode
    r2 = 0  // Reflection coefficient at powered electrode
    r3 = 0.3  // Reflection coefficient at powered electrode
    r4 = 0.0005  // Reflection coefficient at powered electrode
    umWall = 2[V]  // Mean energy of secondary electrons
  propelecg "Properties of grounded electrode" on selection groundedelectrode
    gamma = 0.07  // SEE at the grounded electrode
    r1 = 0.3  // Reflection coefficient at grounded electrode
    r2 = 0  // Reflection coefficient at grounded electrode
    r3 = 0.3  // Reflection coefficient at grounded electrode
    r4 = 0.0005  // Reflection coefficient at grounded electrode
    umWall = 2[V]  // Mean energy of secondary electrons
  propdielectrics "Properties of dielectric wall" on selection dielectricwalls
    gamma = 0  // SEE at the dielectrics
    r1 = 0  // Reflection coefficient at wall (dielectrics)
    r2 = 0  // Reflection coefficient at wall (dielectrics)
    r3 = 0.3  // Reflection coefficient at wall (dielectrics)
    r4 = 0.005  // Reflection coefficient at wall (dielectrics)
    umWall = 0[V]  // Mean energy of secondary electrons
  specprop "Species properties" on selection plasmadomain
    M1 = 9.1094e-31[kg]  // Particle mass of species e
    M2 = 6.6335e-26[kg]  // Particle mass of species Ar
    M3 = 6.6335e-26[kg]  // Particle mass of species Ar[*]
    M4 = 6.6335e-26[kg]  // Particle mass of species Ar^+
    T1 = 2/3*Umean*e0/kB  // Temperature of electrons
    T2 = Tgas  // Temperature of species Ar
    T3 = Tgas  // Temperature of species Ar[*]
    T4 = Tgas  // Temperature of species Ar^+
    vth1 = sqrt(8*kB*T1/(pi*M1))  // Thermal velocity of electrons
    vth2 = sqrt(8*kB*T2/(pi*M2))  // Thermal velocity of species Ar
    vth3 = sqrt(8*kB*T3/(pi*M3))  // Thermal velocity of species Ar[*]
    vth4 = sqrt(8*kB*T4/(pi*M4))  // Thermal velocity of species Ar^+
    V4_z = -nojac(b4)*Phiz
    V1_z = nojac(b1)*Phiz
    Veps_z = nojac(beps)*Phiz
    N2 = 100/100*N  // Constant gas density for background gas
    N1 = exp(n1)*1[1/m^3]  // Density of e
    N3 = exp(n3)*1[1/m^3]  // Density of Ar[*]
    N4 = exp(n4)*1[1/m^3]  // Density of Ar^+
    We = exp(we)*1[V/m^3]  // Electron energy density
  plasma "Plasma variables" on selection plasmadomain
    N = p/(kB*Tgas)  // Gas density
    Umean = We/N1  // Mean electron energy
    Te = 2/3*Umean*e0/kB  // Temperature of electrons
    E = abs(Phiz)  // Electric field strength
    EdN = E/N  // Reduced electric field
    Tgas = T0  // Gas temperature
    p = p0  // Gas pressure
  gas "Gas properties" on selection plasmadomain
    rho = e0*(-N1+1*N4)  // Space charge density
    epsilonr = 1  // Relative permittivity
  dielectric "Dielectric properties" on selection dielectric
    rho = 0  // Space charge density
    epsilonr = 3.4  // relative permittivity
  transportcoeffs "Transport coefficients" on selection plasmadomain
    D3 = 1.738e+20[1/m/s]/N  // Diffusion coefficient of Ar[*]
    D4 = Fun_ND4(T4, b4)/N  // Diffusion coefficient of Ar^+
    b4 = Fun_Nb4(EdN)/N  // Mobility of Ar^+
    D1 = Fun_ND1(Umean)/N  // Diffusion coefficient of e
    b1 = Fun_Nb1(Umean)/N  // Mobility of e
    Deps = 5/3*D1  // Electron energy diffusion
    beps = 5/3*b1  // Electron energy mobility
  ratecoefficients on selection plasmadomain
    k2 = Fun_k2(Umean)  // Rate coefficient of e + Ar --> e + Ar[*]
    k3 = Fun_k3(Umean)  // Rate coefficient of e + Ar --> e + e + Ar^+
    k4 = Fun_k4(Umean)  // Rate coefficient of Ar[*] + e --> Ar^+ + e + e
    k5 = Fun_k5(Umean)  // Rate coefficient of Ar[*] + e --> Ar + e
    k6 = 8.1e-16[m^3/s]  // Rate coefficient of Ar[*] + Ar[*] --> Ar^+ + e + Ar
    k7 = 1000000[1/s]  // Rate coefficient of Ar[*] --> Ar
  electronenergyratecoefficients on selection plasmadomain
    kene1 = Fun_kene1(Umean)  // Energy rate coefficient of e + Ar --> e + Ar
    kene2 = Fun_kene2(k2)  // Electron energy rate coefficient 2: e + Ar --> e + Ar[*]
    kene3 = Fun_kene3(k3)  // Electron energy rate coefficient 3: e + Ar --> e + e + Ar^+
    kene4 = Fun_kene4(k4)  // Electron energy rate coefficient 4: Ar[*] + e --> Ar^+ + e + e
    kene5 = Fun_kene5(k5)  // Electron energy rate coefficient 5: Ar[*] + e --> Ar + e
    kene6 = Fun_kene6(k6)  // Electron energy rate coefficient 6: Ar[*] + Ar[*] --> Ar^+ + e + Ar
  rates "Reaction rates" on selection plasmadomain
    R2 = k2*N1*N2  // Rate for reaction e + Ar --> e + Ar[*]
    R3 = k3*N1*N2  // Rate for reaction e + Ar --> e + e + Ar^+
    R4 = k4*N1*N3  // Rate for reaction Ar[*] + e --> Ar^+ + e + e
    R5 = k5*N1*N3  // Rate for reaction Ar[*] + e --> Ar + e
    R6 = k6*N3^2  // Rate for reaction Ar[*] + Ar[*] --> Ar^+ + e + Ar
    R7 = k7*N3  // Rate for reaction Ar[*] --> Ar
  energyrates "Energy reaction rates" on selection plasmadomain
    Rene1 = kene1*N1*N2  // Electron energy rate for reaction e + Ar --> e + Ar
    Rene2 = kene2*N1*N2  // Electron energy rate for reaction e + Ar --> e + Ar[*]
    Rene3 = kene3*N1*N2  // Electron energy rate for reaction e + Ar --> e + e + Ar^+
    Rene4 = kene4*N1*N3  // Electron energy rate for reaction Ar[*] + e --> Ar^+ + e + e
    Rene5 = kene5*N1*N3  // Electron energy rate for reaction Ar[*] + e --> Ar + e
    Rene6 = kene6*N3^2  // Electron energy rate for reaction Ar[*] + Ar[*] --> Ar^+ + e + Ar
  fluxes on selection plasmadomain
    F3_z = -nojac(D3)*d(N3,z)
    F4_z = -nojac(D4)*d(N4,z) + V4_z*N4
    F1_z = -d(nojac(D1)*N1,z) + V1_z*N1
    Q_z = -d(nojac(Deps)*We,z) + Veps_z*We
  bndfluxes "Boundary fluxes" on selection plasmaboundaries
    F3_boundary = ((1-r3)/(1+r3))*(0.5*vth3*N3)
    F4_boundary = ((1-r4)/(1+r4))*(abs(V4_z*eq4.nz*N4) + 0.5*vth4*N4)
    F1_boundary = ((1-r1)/(1+r1))*(abs(V1_z*eq1.nz*N1) + 0.5*vth1*N1) - (2*gamma/(1+r1))*(max(F4_boundary,0))
    Q_boundary = ((1-r1)/(1+r1))*(abs(Veps_z*eq1.nz*We) + 2/3*vth1*We) - umWall*(2*gamma/(1+r1))*(max(F4_boundary,0))
    DisplacementCurrent = -epsilon0*epsilonr*Phizt*poeq.nz  // Displacement current density
    NormalChCFlux = e0*(-F1_boundary+1*F4_boundary)  // Charge carrier flux onto the wall
  sources "Source terms" on selection plasmadomain
    S1 = R3+R4+R6  // Source term for species e
    S2 = R5+R6+R7-R2-R3  // Source term for species Ar
    S3 = R2-R4-R5-2*R6-R7  // Source term for species Ar[*]
    S4 = R3+R4+R6  // Source term for species Ar^+
    Seps = Phiz*F1_z+Rene1+Rene2+Rene3+Rene4+Rene5+Rene6  // Source term for the electron energy balance
  electrical
    Icond = Area*IntCPBoundary(NormalChCFlux)  // Conduction current
    Idispl = Area*IntCPBoundary(DisplacementCurrent)  // Displacement current
    Itotal = Icond+Idispl  // Total current
    PoweredVoltage = U0  // Powered voltage

Selections
  dielectric: Explicit on domains 1
  plasmadomain: Explicit on domains 2
  plasmaboundaries: Explicit on boundaries 2, 3
  poweredelectrode: Explicit on boundaries 1
  groundedelectrode: Explicit on boundaries 3
  currentprobebndry: Explicit "Current probe boundary" on boundaries 2
  electrodes: Explicit on boundaries 1, 3
  dielectricwalls: Explicit on boundaries 2

Couplings
  intop1: Integration "IntCPBoundary" on selection currentprobebndry | opname = IntCPBoundary

Probes
  pdom1: DomainPoint "Electric potential boundary 1" | bndsnap1 = on; coords = DBthickness
    ppb1: PointExpr "Electric potential boundary 1"
      probename = V1
      expr = Phi
      unit = V
      descr = Electric potential boundary 1
      table = tbl1
  pdom2: DomainPoint "Electric potential boundary 2" | bndsnap1 = on; coords = DBthickness+ElecDist
    ppb2: PointExpr "Electric potential boundary 2"
      probename = V2
      expr = Phi
      unit = V
      descr = Electric potential boundary 2
      table = tbl1
  var1: GlobalVariable "Gap Voltage" | probename = GapVoltage; expr = V1-V2; unit = V; descr = Gap voltage; table = tbl1
  var2: GlobalVariable "Total Current"
    probename = TotalCurrent
    expr = Itotal
    unit = A
    descr = Total current
    table = tbl1

Geometry
  Geom1D "1D plane-parallel" (1D, length unit m)
    i1: Interval
      coordsource = vector
      coordvec = 0, DBthickness, ElecDist+DBthickness
      intervals = many
      p = 0, DBthickness, ElecDist+DBthickness
    fin: Finalize "Form Union"

Physics
  sceq: BoundaryODE "Surface charge accumulation" on selection dielectricwalls
    dependent variable sigma
    ShapeProperty.order = 1
    Units.DependentVariableQuantity = none
    Units.CustomDependentVariableUnit = C/m^2
    Units.CustomSourceTermUnit = C/(m^2*s)
    dode1: DistributedODE (default) | f = NormalChCFlux; da = 1
    init1: init "Initial Values 1" (default) | sigma = 0
  poeq: PoissonEquation "Poisson's Equation" on all domains
    dependent variable Phi
    Units.DependentVariableQuantity = electricpotential
    Units.SourceTermQuantity = spacechargedensity
    peq1: PoissonEquation "Poisson's Equation 1" (default) | f = rho; c = epsilon0*epsilonr
    zflx1: ZeroFluxBoundary "Zero Flux 1" (default)
    init1: init "Initial Values 1" (default) | Phi = 0
    dir1: DirichletBoundary "Applied voltage" on selection poweredelectrode | r = PoweredVoltage
    dir2: DirichletBoundary "Ground" on selection groundedelectrode | r = 0
    flux1: FluxBoundary "Flux/Source 1" on selection dielectricwalls | g = sigma
  eq1: GeneralFormPDE "Species e" on selection plasmadomain
    dependent variable n1
    ShapeProperty.order = 1
    Units.DependentVariableQuantity = none
    Units.CustomDependentVariableUnit = 1
    Units.CustomSourceTermUnit = 1/(m^3*s)
    gfeq1: GeneralFormPDE (default) | f = S1 + SrcStabFac*exp(-SrcStabPar*n1); Ga = F1_z; da = N1
    zflx1: ZeroFluxBoundary "Zero Flux 1" (default)
    init1: init "Initial Values 1" (default) | n1 = log(1000000000000)
    flux1: FluxBoundary "Flux/Source 1" on selection plasmaboundaries | g = -F1_boundary
  eq3: GeneralFormPDE "Species Ar[*]" on selection plasmadomain
    dependent variable n3
    ShapeProperty.order = 1
    Units.DependentVariableQuantity = none
    Units.CustomDependentVariableUnit = 1
    Units.CustomSourceTermUnit = 1/(m^3*s)
    gfeq1: GeneralFormPDE (default) | f = S3 + SrcStabFac*exp(-SrcStabPar*n3); Ga = F3_z; da = N3
    zflx1: ZeroFluxBoundary "Zero Flux 1" (default)
    init1: init "Initial Values 1" (default) | n3 = log(1000000000000)
    flux1: FluxBoundary "Flux/Source 1" on selection plasmaboundaries | g = -F3_boundary
  eq4: GeneralFormPDE "Species Ar^+" on selection plasmadomain
    dependent variable n4
    ShapeProperty.order = 1
    Units.DependentVariableQuantity = none
    Units.CustomDependentVariableUnit = 1
    Units.CustomSourceTermUnit = 1/(m^3*s)
    gfeq1: GeneralFormPDE (default) | f = S4 + SrcStabFac*exp(-SrcStabPar*n4); Ga = F4_z; da = N4
    zflx1: ZeroFluxBoundary "Zero Flux 1" (default)
    init1: init "Initial Values 1" (default) | n4 = log(1000000000000)
    flux1: FluxBoundary "Flux/Source 1" on selection plasmaboundaries | g = -F4_boundary
  eq5: GeneralFormPDE "Energy density of electrons" on selection plasmadomain
    dependent variable we
    ShapeProperty.order = 1
    Units.DependentVariableQuantity = none
    Units.CustomDependentVariableUnit = 1
    Units.CustomSourceTermUnit = V/(m^3*s)
    gfeq1: GeneralFormPDE (default) | f = Seps + SrcStabFac*exp(-SrcStabPar*we)*1[V]; Ga = Q_z; da = We
    zflx1: ZeroFluxBoundary "Zero Flux 1" (default)
    init1: init "Initial Values 1" (default) | we = log(3*1000000000000)
    flux1: FluxBoundary "Flux/Source 1" on selection plasmaboundaries | g = -Q_boundary

Mesh
  mesh1 "Geometric_1D"
    size: MeshSizeDefault | hmax = 8.04E-4; hmin = 3.6E-6; hcurve = 0.3; hgrad = 1.3
    edg1: Edge on remaining entities
      dis1: Distribution on selection plasmadomain | numelem = 500

Studies
  FluidPoisson "Study Plasma"
    time: Transient "Time Dependent" | tlist = range(0.0000000000e+00, 1.0000000000e-08, 1.0000000000e-06); rtol = 1e-4

Solver configurations
  sol1 "Solution 1" (study FluidPoisson)
    v1: Variables "Dependent Variables 1" | scalemethod = manual; scaleval = 10
    t1: Time "Time-Dependent Solver 1"
      tlist = range(0.0000000000e+00, 1.0000000000e-08, 1.0000000000e-06)
      atolglobalmethod = unscaled
      atolglobalvaluemethod = manual
      atolglobal = 1e-4
      initialstepbdf = 1e-15
      maxorder = 2
      dDef: Direct | linsolver = pardiso
      fc1: FullyCoupled "Fully Coupled Const Newton"
        linsolver = dDef
        dtech = const
        maxiter = 40
        jtech = once
        stabacc = aacc

Datasets
  dset1: Solution "Probe Solution 1" | solution = sol1
  cpt1: CutPoint1D "Electric potential boundary 1" | data = dset1; pointx = DBthickness
  cpt2: CutPoint1D "Electric potential boundary 2" | data = dset1; pointx = DBthickness+ElecDist
  dset2: Solution | solution = sol1

Derived values
  pev1: EvalPoint "Electric potential boundary 1" | data = cpt1; table = tbl1; expr = Phi
  pev2: EvalPoint "Electric potential boundary 2" | data = cpt2; table = tbl1; expr = Phi
  gev1: EvalGlobal "Gap Voltage" | data = dset1; table = tbl1; expr = V1-V2
  gev2: EvalGlobal "Total Current" | data = dset1; table = tbl1; expr = Itotal

Plots
  pg1: PlotGroup1D "Probe Plot Group 1"
    tblp1: Table "Probe Table Graph 1" | table = tbl1
  pg2: PlotGroup1D "Probe Plot Group 2"
    tblp1: Table "Probe Table Graph 1" | table = tbl1
  pg3: PlotGroup1D "Probe Plot Group 3"
    tblp1: Table "Probe Table Graph 1" | table = tbl1
  pg4: PlotGroup1D "Probe Plot Group 4"
    tblp1: Table "Probe Table Graph 1" | table = tbl1
  pg5: PlotGroup1D "Electron" | data = dset1; xlabel = Gap distance (m); yseclabel = Mean electron energy (V)
    lngr1: LineGraph "Density" on selection plasmadomain | expr = N1; autosolution = off
    lngr2: LineGraph "Energy" on selection plasmadomain | expr = Umean; autosolution = off